*HEADING
This file was created for the AnyBody-Abaqus interface demonstration purpose
*NODE
       1,  1.494994e-001,  9.776373e-003, -2.473422e-002
       2,  1.397652e-001,  9.642898e-003, -2.182784e-002
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*ELEMENT, TYPE=C3D4, ELSET=allelements
       1,       1,       2,       3,       4
       2,       5,       6,       7,       8
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*SOLID SECTION, MATERIAL=BONE, ELSET=allelements
*MATERIAL, NAME=BONE
*ELASTIC, TYPE=ISO
5000000, 0.3, 10
