// Model for the "Making Things Move" tutorial.

Main = {

  // The actual body model goes in this folder
  AnyFolder MyModel = {

    // Global Reference Frame
    AnyFixedRefFrame GlobalRef = {
    };  // Global reference frame

    AnySeg Pendulum = {
      Mass = 1;
      Jii = {1, 0.01, 1}/15;
      AnyRefNode Origin = {
        sRel = {0, 0.5, 0};
      };
      AnyRefNode P1 = {
        sRel = {0, -0.5, 0};
      };
      AnyDrawSeg drw = {};
    };

    AnyInputC3D C3D =
    {
      FileName = "pendulum.c3d";
      //ReadAllDataOnOff = On;
      //TruncateExtraCharsInNamesOnOff = On;
      //MakeNameUniqueStr = "_";
      //PointsScaleFactor = 1.0;
      ConstructModelOnOff = Off;
      ConstructChartOnOff = Off;
      //ConstructWeightFunUsingResidualOnOff = Off;
      //GapFillUsingResidualsOnOff = Off;
      //MarkerUseAllPointsOnOff = Off;
      //MarkerUseCamMaskOnOff = On;
      //MarkerIndices = ;
      //MarkerLabels = ;
      //MarkerFilterIndex = 0;
      //ProcessedDataFilterIndex = 0;
      //AnalogFilterIndex = -1;
      Filter =
      {
        //z0 = ;
        AutomaticInitialConditionOnOff = On;
        FilterForwardBackwardOnOff = On;
        N = 2;
        Fc = {2};
        Type = LowPass;
      };
      //WeightThreshold = 0.0;
      //WeightOutput = {{0.0, 1.0}, {0.0, 1.0}, {0.0, 1.0}};
      //WeightTransitionTime = 0.1;
      //SearchAndReplace = ;
      //WriteMarkerDataToFilesOnOff = Off;
      //MarkerScaleXYZ = {0.025, 0.025, 0.025};
      //MarkerRGB = {0.65, 0.65, 0.65};
      //MarkerDrawOnOff = On;
      //MarkerInterPolType = Bspline;
      //MarkerBsplineOrder = 4;
    };

//    AnyKinMotion JointDriver =
//    {
//      AnyRevoluteJoint &Jnt = .Joint;
//      AnyFunPolynomial DriverFun = {
//            PolyCoef = {{0, 5, -0.4}};
//        };
//    };
    AnyKinDriverMarker C3DMotion =
    {
      //RefFrames = ;
      //Surfaces = ;
      //KinMeasureArr = ;
      //KinMeasureIndexArr = ;
      //MeasureOrganizer = ;
      //CType = ;
      //WeightFun = ;
      //DriverPos0 = ;
      //DriverVel0 = ;
      //DriverAcc0 = ;
      AnyRefFrame &Marker = .Pendulum.P1;
      //AnyRefFrame &<Insert name1> = <Insert object reference (or full object definition)>;
      AnyParamFun &Trajectory = Main.MyModel.C3D.Points.Markers.L000.PosInterpol;

      AnyDrawKinMeasure drw =
      {
        Label = Off;
        Size = 0.07;
        Line = Off;
      };
    };

    AnyRevoluteJoint Joint = {
      AnyRefFrame &Ground = .GlobalRef;
      AnyRefFrame &Pendulum = .Pendulum.Origin;
    };

  }; // MyModel

  // The study: Operations to be performed on the model
  AnyBodyStudy MyStudy = {
    AnyFolder &Model = .MyModel;
    Gravity = {0.0, -9.81, 0.0};
    AnyIntVar FirstFrame = Main.MyModel.C3D.Header.FirstFrameNo;
    AnyIntVar LastFrame = Main.MyModel.C3D.Header.LastFrameNo;
    tStart =FirstFrame/Main.MyModel.C3D.Header.VideoFrameRate+2*Kinematics.ApproxVelAccPerturb;
    tEnd = LastFrame/Main.MyModel.C3D.Header.VideoFrameRate-2*Kinematics.ApproxVelAccPerturb;
    InitialConditions.SolverType = KinSolOverDeterminate;
    Kinematics.SolverType = KinSolOverDeterminate;
  };

};  // Main
