// Scaling Tutorial: RBF transform appendix.
// This model is used for demonstration of how to use AnyFunTransform3DRBF and AnyFunTransform3DSTL classes. Various settings and methods are being tested.
// The deformation field is visualized for better understanding of how the transforms work.
Main = {

  // The actual body model goes in this folder
  AnyFolder MyModel = {
    // Global Reference Frame
    AnyFixedRefFrame GlobalRef = {

      AnyFolder Scaling = {
        AnyMatrix SourceLandmarks = {
          {0.0709736, 0.0184485, -0.000127864},
          {0.0648285, 0.0049608, 0.000451266},
          {0.0621017, -0.00819697, 0.00140694},
          {0.0553114, 0.0230441, -0.000445997},
          {0.0393397, 0.0248069, -0.000680061},
          {0.0377703, 0.0133058, -0.00105235},
          {0.0360412, 0.00201606, -0.000391467},
          {0.0472074, -0.00352919, -0.000413361},
          {0.0550465, 0.0208449, -0.0224952},
          {0.0520597, 0.00993834, -0.0203476},
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          {0.0142823, 0.00469346, -0.000166401}
        };

        AnyMatrix TargetLandmarks = 0.001*{
          {-11.6256, -134.079, 34.0564},
          {-11.4732, -141.378, 42.8396},
          {-11.8893, -147.6, 55.5568},
          {-10.9339, -149.757, 22.2911},
          {-10.0394, -169.576, 15.2177},
          {-10.0568, -167.821, 26.3967},
          {-11.3658, -172.414, 35.9614},
          {-11.1052, -161.143, 44.4721},
          {16.8688, -150.921, 26.3913},
          {11.4513, -156.085, 35.6888},
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          {-12.5005, -196.124, 24.7113}
        };

        AnyFunTransform3DLin2 AffineTransform = {
          Points0 = .SourceLandmarks;
          Points1 = .TargetLandmarks;
        };

        AnyFunTransform3DRBF RBFTransform =
        {
          PreTransforms = {&.AffineTransform};
          RBFDef = {
            Type = RBF_ThinPlate;
            Param = 0.2;
          };
          Points0 = .SourceLandmarks;
          PolynomDegree = 1;
          Points1 = .TargetLandmarks;
          BoundingBox =
          {
          Type = BB_Cartesian;
          ScaleXYZ = {2, 2, 2};
          DivisionFactorXYZ = 2*{1, 1, 1};
          };
          BoundingBoxOnOff = On;
        };
        AnyFunTransform3DSTL STLTransform =
        {
          PreTransforms = {&.RBFTransform};
          RBFDef = {
            Type = RBF_ThinPlate;
            Param = 1;
          };
          AnyFixedRefFrame Input  = {
            AnySurfSTL Src = {
              FileName = "L5Src.stl";
              ScaleXYZ = {1, 1, 1};
            };
            AnySurfSTL Trg = {
              FileName = "L5Trg";
              ScaleXYZ = {1, 1, 1}*0.001;
            };
          };
          SurfaceObjects0 = {&Input.Src};
          SurfaceObjects1 = {&Input.Trg };
          NumPoints = 20;
          //UseClosestPointMatchingOnOff = On;
          PolynomDegree = 1;
          BoundingBox = {
            Type = BB_Cartesian;
            ScaleXYZ = {2, 2, 2};
            DivisionFactorXYZ = 2*{1, 1, 1};
          };
          BoundingBoxOnOff = On;
        };

      };

      AnyRefNode node0 = {sRel={0,0,0};AnyDrawNode a={ScaleXYZ={1,1,1}*0.01;};};
      #include "grid.any"
      AnyDrawPointCloud a =
      {
        RGB = {1, 0, 0};
        Points = .Scaling.AffineTransform(.DrawGrid.A);
      };
      AnyDrawPointCloud b =
      {
        RGB = {0, 0, 1};
        Points = .Scaling.RBFTransform(.DrawGrid.A);
      };
      AnyDrawSurf src = {
        FileName = "L5Src";
        AnyFunTransform3D &f = .Scaling.STLTransform;
        RGB={0,0,1};
      };
      AnyDrawSurf trg = {
        FileName = "L5Trg";
        ScaleXYZ={1,1,1}*0.001;
        RGB={0,1,0};
      };

    };  // Global reference frame

  }; // MyModel

  // The study: Operations to be performed on the model
  AnyBodyStudy MyStudy = {
    AnyFolder &Model = .MyModel;
    Gravity = {0.0, -9.81, 0.0};
  };

};  // Main
